# Синус разложение в ряд Маклорена
x := 2.2981239613
x*(5040 - x^2*(840 - x^2*(42 - x^2)))/5040 = 0.742255
sin(2.2981239613) = 0.746954
# Косинус разложение в ряд Тейлора
1 - x^2/(1*2) + x^4/(1*2*3*4) - x^6/(1*2*3*4*5*6) + x^8/(1*2*3*4*5*6*7*8) = -0.663788
cos(2.2981239613) = -0.664876
